// COMSOL Multiphysics 6.2.0.278 model "GaAs_2d.mph"
// Outline of the model tree

Parameters
  f = 20[GHz]
  tmax = 4/f

Geometry
  geom1 "Geometry 1" (2D, length unit µm)
    r1: Rectangle | size = {25, 2}
    r2: Rectangle | pos = {0, 2}; size = {15, 0.1}
    r3: Rectangle | pos = {3, 2}; size = {2, 0.1}
    fin: Finalize "Form Union"

Materials
  mat1: Common "GaAs - Gallium Arsenide" on all domains
    def "Basic"
      heatcapacity = 330[J/(kg*K)]
      density = 5500[kg/m^3]
      thermalconductivity = 46[W/(m*K)]
      relpermittivity = 12.9
    SemicondMaterial "Semiconductor material"
      Eg0 = 1.424[V]
      chi0 = 4.07[V]
      Nv = (T/1[K])^(3/2)*1.83e15[1/cm^3]
      Nc = (8.63e13*(T/1[K])^(3/2)*(1-1.93e-4*(T/1[K])-4.19e-8*(T/1[K])^2+21*exp(-0.29[V]*e_const/(k_B_const*T))+44*exp(-0.48[V]*e_const/(k_B_const*T))))[1/cm^3]
      mun = 8500[cm^2/(V*s)]
      mup = 400[cm^2/(V*s)]
    JainRoulstonModel
      An_jr = 16.5e-9[V]
      Bn_jr = 2.39e-7[V]
      Cn_jr = 91.4e-12[V]
      Ap_jr = 9.83e-9[V]
      Bp_jr = 3.9e-7[V]
      Cp_jr = 3.9e-12[V]
      Nref_jr = 1[1/cm^3]
      alpha_jr = 0.5

Physics
  semi: Semiconductor on all domains
    dependent variable V
    smm1: SemiconductorMaterialModel (default)
    ins1: Insulation (default)
    zc1: ZeroCharge (default)
    ii1: InsulatorInterface (default)
    cont1: Continuity "Continuity/Heterojunction 1" (default)
    init1: init "Initial Values 1" (default)
    mc1: MetalContact on boundaries 8 | ContactType = ohmic; TerminalType = Circuit; V0 = -1
    mc2: MetalContact on boundaries 12 | TerminalType = Voltage
    mc3: MetalContact on boundaries 13 | TerminalName = 2; TerminalType = Voltage
    adm1: AnalyticDopingModel on domains 1 | impurityType = donor; NDc = 2e18[1/cm^3]
    adm2: AnalyticDopingModel on domains 2-4 | impurityType = donor; NDc = 2e17[1/cm^3]

Mesh
  mesh1 "Mesh 1"
    size: MeshSizeDefault | table = semi; hmax = 0.325; hmin = 0.05; hcurve = 0.3; hgrad = 1.15
    size1: Size on boundaries 4, 6-10, 12, 13 | hauto = 4
    ftri1: FreeTri "Free Triangular 1" on remaining entities | smoothmaxiter = 4; smoothmaxdepth = 4

Studies
  std1 "Study 1"
    stat: Stationary

Solver configurations
  sol1 "Solution 1" (study std1)
    v1: Variables "Dependent Variables 1"
    s1: Stationary "Stationary Solver 1" | stol = 1.0E-6
      fc1: FullyCoupled | linsolver = d1; initstep = 0.1; minsteprecovery = 0.001; maxiter = 50
      d1: Direct

Datasets
  dset1: Solution | solution = sol1

Plots
  pg1: PlotGroup2D "Electron Concentration (semi)" | data = dset1
    surf1: Surface | expr = semi.N; unit = 1/cm^3
  pg2: PlotGroup2D "Hole Concentration (semi)" | data = dset1
    surf1: Surface | expr = semi.P; unit = 1/cm^3
  pg3: PlotGroup2D "Electric Potential (semi)" | data = dset1
    surf1: Surface | expr = V
  pg4: PlotGroup2D "Net Dopant Concentration (semi)"
    data = dset1
    title = Net Dopant Concentration \vert N<sub>d</sub> - N<sub>a</sub>\vert: P-type (Red), N-type (Blue)
    surf2: Surface "P-type" | expr = semi.Nnetdop; unit = 1/cm^3
      filt1: Filter | expr = semi.Na-semi.Nd > 1[1/cm^3]; useder = on
    surf1: Surface "N-type" | expr = semi.Nnetdop; unit = 1/cm^3
      filt1: Filter | expr = semi.Nd-semi.Na > 1[1/cm^3]; useder = on