// COMSOL Multiphysics 6.2.0.278 model "redo_GaAs2.mph"
// Outline of the model tree

Parameters
  f = 20[GHz]
  tmax = 4/f

Geometry
  geom1 "Geometry 1" (2D, length unit µm)
    r1: Rectangle | size = {25, 2}
    r2: Rectangle | pos = {0, 2}; size = {15, 0.1}
    r3: Rectangle | pos = {3, 2}; size = {2, 0.1}
    fin: Finalize "Form Union"

Materials
  mat1: Common "GaAs - Gallium Arsenide" on all domains
    def "Basic"
      heatcapacity = 330[J/(kg*K)]
      density = 5500[kg/m^3]
      thermalconductivity = 46[W/(m*K)]
      relpermittivity = 12.9
    SemicondMaterial "Semiconductor material"
      Eg0 = 1.424[V]
      chi0 = 4.07[V]
      Nv = (T/1[K])^(3/2)*1.83e15[1/cm^3]
      Nc = (8.63e13*(T/1[K])^(3/2)*(1-1.93e-4*(T/1[K])-4.19e-8*(T/1[K])^2+21*exp(-0.29[V]*e_const/(k_B_const*T))+44*exp(-0.48[V]*e_const/(k_B_const*T))))[1/cm^3]
      mun = 8500[cm^2/(V*s)]
      mup = 400[cm^2/(V*s)]
    JainRoulstonModel
      An_jr = 16.5e-9[V]
      Bn_jr = 2.39e-7[V]
      Cn_jr = 91.4e-12[V]
      Ap_jr = 9.83e-9[V]
      Bp_jr = 3.9e-7[V]
      Cp_jr = 3.9e-12[V]
      Nref_jr = 1[1/cm^3]
      alpha_jr = 0.5

Physics
  semi: Semiconductor on all domains
    dependent variable V
    smm1: SemiconductorMaterialModel (default)
    ins1: Insulation (default)
    zc1: ZeroCharge (default)
    ii1: InsulatorInterface (default)
    cont1: Continuity "Continuity/Heterojunction 1" (default)
    init1: init "Initial Values 1" (default)
    adm1: AnalyticDopingModel on domains 2-4 | impurityType = donor; NDc = 2e17[1/cm^3]
    adm2: AnalyticDopingModel on domains 1 | impurityType = donor; NDc = 2e18[1/cm^3]
    mc1: MetalContact on boundaries 8 | TerminalType = Circuit
    mc2: MetalContact on boundaries 12
    mc3: MetalContact on boundaries 13
  cir: Circuit "Electrical Circuit"
    dependent variable voltages
    gnd1: GroundNode
    R1: Resistor | R = 100[kΩ]; Connections = {1, 0}
    V1: VoltageSource | Connections = {2, 0}; sourceType = SineSource; value = 0.5; freq = f
    IvsU1: ModelDeviceIV "External I vs. U 1" | V_src = root.comp1.semi.V0_1; Connections = {2, 1}
  cir2: Circuit "Electrical Circuit 2"
    dependent variable voltages2
    gnd1: GroundNode
    V1: VoltageSource | Connections = {0, 1}; value = 0.5
    V2: VoltageSource | Connections = {1, 2}; sourceType = SineSource; value = 0.5; freq = f
    V3: VoltageSource | Connections = {2, 3}; sourceType = SineSource; value = 0.5; freq = f
    R1: Resistor | R = 50; Connections = {3, 4}
    IvsU1: ModelDeviceIV "External I vs. U 1" | V_src = root.comp1.semi.V0_1; Connections = {4, 5}
    R2: Resistor | R = 50; Connections = {5, 6}
    gnd2: GroundNode | Connections = 6

Mesh
  mesh1 "Mesh 1" (physics-controlled)
    size: MeshSizeDefault | table = semi

Studies
  std1 "Study 1"
    stat: Stationary
  std2 "Study 2"
    time: Transient "Time Dependent" | tlist = range(0,tmax/1000,tmax)

Solver configurations
  sol1 "Solution 1" (study std1)
    v1: Variables "Dependent Variables 1"
    s1: Stationary "Stationary Solver 1" | stol = 1.0E-6
      fc1: FullyCoupled | linsolver = d1; initstep = 0.1; minsteprecovery = 0.001; maxiter = 50
      d1: Direct
  sol2 "Solution 2" (study std2)
    v1: Variables "Dependent Variables 1"
    t1: Time "Time-Dependent Solver 1" | tlist = range(0,tmax/1000,tmax); rtol = 1.0E-5; tstepsbdf = strict
      fc1: FullyCoupled | linsolver = d1; dtech = auto; maxiter = 4
      d1: Direct "Direct (Merged)"

Datasets
  dset1: Solution | solution = sol1
  dset2: Solution | solution = sol2

Plots
  pg1: PlotGroup2D "Electron Concentration (semi)" | data = dset1
    surf1: Surface | expr = semi.N; unit = 1/cm^3
  pg2: PlotGroup2D "Hole Concentration (semi)" | data = dset1
    surf1: Surface | expr = semi.P; unit = 1/cm^3
  pg3: PlotGroup2D "Electric Potential (semi)" | data = dset1
    surf1: Surface | expr = V
  pg4: PlotGroup2D "Net Dopant Concentration (semi)"
    data = dset1
    title = Net Dopant Concentration \vert N<sub>d</sub> - N<sub>a</sub>\vert: P-type (Red), N-type (Blue)
    surf2: Surface "P-type" | expr = semi.Nnetdop; unit = 1/cm^3
      filt1: Filter | expr = semi.Na-semi.Nd > 1[1/cm^3]; useder = on
    surf1: Surface "N-type" | expr = semi.Nnetdop; unit = 1/cm^3
      filt1: Filter | expr = semi.Nd-semi.Na > 1[1/cm^3]; useder = on
  pg5: PlotGroup2D "Electron Concentration (semi) 1" | data = dset2
    surf1: Surface | expr = semi.N; unit = 1/cm^3
  pg6: PlotGroup2D "Hole Concentration (semi) 1" | data = dset2
    surf1: Surface | expr = semi.P; unit = 1/cm^3
  pg7: PlotGroup2D "Electric Potential (semi) 1" | data = dset2
    surf1: Surface | expr = V
  pg8: PlotGroup2D "Net Dopant Concentration (semi) 1"
    data = dset2
    title = Net Dopant Concentration \vert N<sub>d</sub> - N<sub>a</sub>\vert: P-type (Red), N-type (Blue)
    surf2: Surface "P-type" | expr = semi.Nnetdop; unit = 1/cm^3
      filt1: Filter | expr = semi.Na-semi.Nd > 1[1/cm^3]; useder = on
    surf1: Surface "N-type" | expr = semi.Nnetdop; unit = 1/cm^3
      filt1: Filter | expr = semi.Nd-semi.Na > 1[1/cm^3]; useder = on
  pg9: PlotGroup1D "1D Plot Group 9" | data = dset2
    glob1: Global | expr = semi.I0_1; unit = A; descr = Terminal current